# Hammer Calculations
# For these calculations it is assumed that the main air tank is equipped with a high-delivery regulator and that the hammer cycle consists of applying the output of this regulator to the air cylinder for a preset fraction of the cylinder's stroke.
#
# The force exerted on the piston is constant for the fraction f of the stroke. Then the force on the piston declines according to the laws of thermodynamics for an adiabatic expansion.
#
# The drives system is a cylinder with a piston attached to chain wrapped around a sprocket on the hammer axle.
# Cylinder
A_throw := π*((d_throw/2)^2 - (d_rod/2)^2) = 26.5072 in^2
Vol_throw := A_throw*stroke
# Mechanism
J_hammer := m_head*len_arm^2 + m_arm*(len_arm/2)^2  # rotational inertia of the arm+hammer
# Thermodynamics
const(ff) := P_0*(ff*Vol_throw)^1.4  # this is the constant required for the adiabatic expansion calc, as a function of fill fraction ff
V_stroke(x) := A_throw*x  # volume expression for the stroke
P(x, ff) := if(V_stroke(x)/Vol_throw ≤ ff, P_0, const(ff)/V_stroke(x)^1.4)  # the complete expression for the pressure
xr := 0*in, .1*in .. stroke
# [plot: P(xr, ffd) (psi) vs xr (in)]
# Motion
r_sprocket := stroke/θ_max = 3.81972 in
x_cyl(θ) := θ*r_sprocket
x_cyl(180*deg) = 12 in
θ_hammer(x) := x/r_sprocket
θ_stroke := θ_hammer(stroke) = 270 deg
T_axle(θ, ff) := P(x_cyl(θ), ff)*A_throw*r_sprocket  # torque applied by cylinder on crank
α_hammer(θ, ff) := T_axle(θ, ff)/J_hammer  # acceleration of hammer
E_hammer(θ, ff) := integral(T_axle(θ, ff), θ = 0 .. θ)
E_hammer(θ_max, ffd) = 10512.8 J
ω_hammer(θ, ff) := sqrt(2*integral(α_hammer(θ, ff), θ = 0 .. θ))  # angular velocity of hammer
t(θ, ff) := integral(2/ω_hammer(θ, ff), θ = 0 .. θ)  # time to get to an angle
θr := 0*deg, 1*deg .. θ_max
# [plot: ω_hammer(θr, ffd) (deg/s) vs θr (deg)]
# System
V_shot := Vol_throw*ffd*P_0/(1*atm)  # volume of air at STP consumed per shot
# [plot: E_hammer(θr, 0.1), E_hammer(θr, ffd), E_hammer(θr, 0.9) vs θr (deg)]
# Parameters
V_tank := 87*ft^3
P_0 ≡ 300*psi  # hammer cylinder pressure
ffd ≡ 35%  # default fill fraction
θ_max ≡ 270*deg  # maximum hammer angle
θ_hit := 190*deg  # hammer angle at impact
d_throw ≡ 6*in  # hammer cylinder diameter
d_rod ≡ 1.5 in  # hammer rod diameter
stroke ≡ 18*in  # hammer cylinder stroke
m_head ≡ 26*lb  # hammer head mass
m_arm ≡ 6*lb  # hammer arm mass
len_arm ≡ 28*in  # hammer arm length
# Results
r_sprocket = 3.81972 in
t(θ_hit, ffd) = 0.223823 s  # swing time
E_hammer(θ_hit, ffd) = 9109.5 J  # terminal swing energy
t_chain := A_throw*P_0 = 7952.16 lbf
w_max := ω_hammer(180*deg, ffd) = 506.516 rpm
n_shots := V_tank/V_shot = 44.0997
F_max := P_0*A_throw = 7952.16 lbf  # peak force from fire cylinder
F_hammer := T_axle(0, ffd)/len_arm = 1084.82 lbf  # force at hammer head
T_max := T_axle(0, ffd) = 2531.25 ft*lbf  # peak torque on hammer axle
# Retract pulse considerations
d_retract ≡ 4 in
d_retract.rod ≡ 0.75 in
A_retract := π*((d_retract/2)^2 - (d_rod/2)^2) = 10.7992 in^2
Ve_retract := A_retract*stroke/3  # volume of retract side at 180 degrees
T_retract(P) := A_retract*P*r_sprocket
A_retract := π*((d_retract/2)^2 - (d_retract.rod/2)^2) = 12.1246 in^2
Fmax_retract := P_0*A_retract = 3637.38 lbf
Fmin_retract := T_retract(40*psi)/len_arm = 58.9286 lbf
Q_retract := 14*cfm  # flow rate of tiny valve from McMaster at 3000psi
t(P) := P*Ve_retract/(1*bar*Q_retract)  # time to fill to a given pressure
t(100*psi) = 1.10801 s
# Hammer axle and bearing:
F_perBearing := F_max/2 = 3976.08 lbf
d_axle := 55 mm = 2.16535 in
l_axle := 120 mm = 4.72441 in
A_effAxle := d_axle*l_axle = 10.23 in^2
P_effAxle := F_perBearing/A_effAxle = 388.668 psi
v_surf := ω_hammer(180*deg, ffd)*d_axle/2 = 1.45866 m/s
ω_hammer(180*deg, ffd) = 506.516 rpm
PV := P_effAxle*v_surf = 111601 ft/min*psi
# What's too small a diameter for an aluminum axle?
τ_y2_6061 := 30*ksi
τ_y1_6061 := 27 ksi
A_double := 2*π*(d_axle/2)^2 = 7.36509 in^2
P_swing := F_max/A_double = 1.07971 ksi  # Wow, totally fine.
# Force on chain idlers & support structure:
θ_idler := 159.2*deg
F_halfIdler := F_max*cos(θ_idler/2) = 1435.52 lbf
F_idler := 2*F_halfIdler = 2871.03 lbf
σ_y1_4_20bolt := 5730*lbf  # per bolt area
# according to Wikipedia, it's approxmiately true that
τ_y1_4_20bolt := 0.58*σ_y1_4_20bolt = 3323.4 lbf
SF_idlerbolt := τ_y1_4_20bolt/F_halfIdler = 2.31512
σ_y6061 := 42*ksi
τ_y6061 := 0.55*σ_y6061 = 23.1 ksi
e_dist := 1.492*in
F_tearout := τ_y6061*e_dist*0.25 in = 8616.3 lbf
SF_tearout := F_tearout/F_halfIdler = 6.00223
# Drive dog shear and bearing loads
A_shear.sprocket := 1.3 in^2
A_shear.shaft := 1.286 in^2
n_dog.sprocket := 6
r_dog.shaft := 1.286 in
r_dog.sprocket := 1.8 in
F_dog.sprocket := T_axle(0, ffd)/r_dog.sprocket = 16875 lbf
P_shear.sprocket := F_dog.sprocket/(n_dog.sprocket*A_shear.sprocket) = 2.16346 ksi
F_dog.shaft := T_axle(0, ffd)/r_dog.shaft = 23619.8 lbf
P_shear.shaft := F_dog.shaft/(n_dog.sprocket*A_shear.shaft) = 3.06114 ksi
r_bearing.shaft := 1.5 in
t_shaft := 0.7 in
l_shaft := 0.54 in
F_bearing.shaft := T_axle(0, ffd)/r_bearing.shaft = 20250 lbf
P_bearing.shaft := F_bearing.shaft/(n_dog.sprocket*t_shaft*l_shaft) = 8.92857 ksi
# Shear Stress on Fasteners - Sprocket and Hammer
r_bolt.sprocket := (2.5/2) in = 1.25 in  # Bolt radius
F_bolt.sprocket := T_axle(0, ffd)/r_bolt.sprocket = 24300 lbf  # Force per bolt
d_bolt.sprocket := 0.25 in  # Diameter of bolt
A_bolt.sprocket := π*(d_bolt.sprocket/2)^2 = 0.0490874 in^2  # Area per bolt
n_bolt := 12  # # of bolts
τ_Gr.8.bolt := 150 ksi  # Grade 8 bolt yield
P_bolt.sprocket := F_bolt.sprocket/(n_bolt*A_bolt.sprocket) = 41.253 ksi  # Stress per bolt
FoS := τ_Gr.8.bolt/P_bolt.sprocket = 3.6361  # Factor of Safety
r_bolt.hammer := (4.5/2) in = 2.25 in
F_bolt.hammer := T_axle(0, ffd)/r_bolt.hammer = 13500 lbf
n_bolt.hammer := 12
P_bolt.hammer := F_bolt.hammer/(n_bolt.hammer*A_bolt.sprocket) = 22.9183 ksi
# Hammer Axle Torsional Stress and Stiffness
r_axle.o := 1.8 in  # Axle outside radius
r_axle.i := (2.9/2) in = 1.45 in  # Axle inside radius
l_axle.hollow := 3.3 in  # Length of axle that's hollow
J_axle := 2*π*(r_axle.o^4 - r_axle.i^4)  # Polar moment of inertia
τ_shear.mod.7075 := 3900 ksi  # Shear modulus of 7075
τ_shear.axle := r_axle.o*T_axle(0, ffd)/J_axle = 1.4319 ksi  # Shear stress
θ_axle := T_axle(0, ffd)*l_axle.hollow/(J_axle*τ_shear.mod.7075) = 0.0385667 deg  # Torsional deflection
